** Definition of Parameters of Analysis
** UT Single Element EXP
**---------------------------------------------------
*PARAMETER
THICKNESS	= 1.
WIDTH		= 1.
**
DISPL		= 0.2
**---------------------------------------------------
** Geometry and Orientation
**---------------------------------------------------
*INCLUDE, INPUT=UT.geo
*NMAP, TYPE=RECTANGULAR, NSET=NALL
0., 0., 0., 1., 0., 0.,
0., 1., 0.,
** Width & Thickness factor
<WIDTH>,1., <THICKNESS>
** 0deg axis aligned with y-direction
*ORIENTATION, name=Ori-00
         0.,     1.,     0.,	-1.,     0.,     0.
3, 0.
*ORIENTATION, name=Ori-15
         0.267949192431,     1.,     0.,	-1.,     0.267949192431,     0.
3, 0.
*ORIENTATION, name=Ori-30
         0.577350269193,     1.,     0.,	-1.,     0.577350269193,     0.
3, 0.
*ORIENTATION, name=Ori-45
         1.,     1.,     0.,	-1.,     1.,     0.
3, 0.
*ORIENTATION, name=Ori-60
         1.,     0.577350269193,     0.,	-0.577350269193,     1.,     0.
3, 0.
*ORIENTATION, name=Ori-75
         1.,     0.267949192431,     0.,	-0.267949192431,     1.,     0.
3, 0.
** 90deg axis aligned with y-direction
*ORIENTATION, name=Ori-90
         1.,     0.,     0.,	0.,     1.,     0.
3, 0.
**-----------------------------------------------------
** Material Data
**-----------------------------------------------------
*SOLID SECTION, elset=ELALL, orientation=Ori-00, material=mat
**
*MATERIAL,NAME=mat
*INCLUDE, INPUT=DP780_abq_deg4_mises.inp
**
**
*DEPVAR
1, EPBAR, "EPBAR"
**------------------------------------------------------
** BOUNDARY CONDITIONS
**------------------------------------------------------
*EQUATION
2
YMAX, 2, 1.
LOAD, 2, -1.
2
YMIN, 2, 1.
BASE, 2, -1.
**
*BOUNDARY
XMIN, 1, 1, 0.
XMIN, 5, 6, 0.
YMIN, 2, 2, 0.
BASE, 2, 2, 0.
YMIN, 4, 4, 0.
ZMIN, 3, 5, 0.
**
** ----------------------------------------------------
*Step, name=Step-1, nlgeom=YES
*Static
1E-5, 1, 0.0, 0.05
**
*BOUNDARY, TYPE=DISPLACEMENT
LOAD, 2, 2, <DISPL>
**-----------------------------------
** OUTPUT REQUESTS
**------------------------------------------------------
*OUTPUT, FIELD, FREQUENCY=1
*ELEMENT OUTPUT
 S, LEP, SDV, TRIAX, SP, MISES
*NODE OUTPUT
 U, V, RF
**
*OUTPUT, HISTORY, FREQUENCY=99
*NODE OUTPUT, NSET=LOAD
 U2, RF2
*NODE OUTPUT, NSET=BASE
 U2, RF2
*ELEMENT OUTPUT, ELSET=ONSET
 TRIAX, SDV, LEP, SP, S, MISES
**------------------------------------------------------
*End Step
